OpenVSP model (file version 5), 18 components.
Geometry view with OpenVSP parameter names; values to 6 digits, angles in degrees, lengths in the model's unit.
Overall bounding box: X_Min=0 X_Len=76.3774 Y_Min=-35.574 Y_Len=71.148 Z_Min=-5.82294 Z_Len=18.6441

Fuselage "fuselage"
  location (X Y Z) 0 0 0, rotation 0 0 0
  bounding box size 75 6.2 6.2
  Design: Length=75
  cross sections:
    n  XLocPercent  YLocPercent  ZLocPercent  shape
    0  0            0            -0.0143416   point
    1  0.0173333    0            -0.0143416   ellipse Ellipse_Height=2.35 Ellipse_Width=2.4
    2  0.028        0            -0.0110821   ellipse Ellipse_Height=3.45 Ellipse_Width=3.1
    3  0.141867     0            -0.0065189   general fuselage BotStr=0.465 BotTanAngle=90 CornerRad=0 Height=6.2 LowStr=0.68 MaxWidthLoc=0.05 TopStr=0.83 TopTanAngle=90 UpStr=0.83 Width=6.2
    4  0.370965     0            -0.0065189   as above
    5  0.616        0            -0.0065189   as above
    6  0.766667     0            -0.0065189   as above
    7  1            0            0.00912647   ellipse Ellipse_Height=1.3 Ellipse_Width=0.5
    8  1            0            0.00912647   point

Wing "Wing", child of "fuselage"
  location (X Y Z) 25.1 0 -2.35, rotation 0 0 0
  symmetric about XZ
  bounding box size 25.5812 71.148 6.4335
  totals: TotalSpan=71.8298 TotalProjectedSpan=71.148 TotalChord=6.29472 TotalArea=542.819 TotalAR=9.32547 MAC=9.74443
  root: chord 15.8283, twist 6.72, airfoil file "B7779 CRM-05a proxy root_eta0000 eta=0.0000"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 BaseThickChord=0.154202 ThickChord=0.154202
  sections:
    n  Span     Root_Chord  Tip_Chord  Area     Sweep    Sweep_Location  Dihedral  Twist  Twist_Location  tip airfoil
    1  12.6196  15.8283     8.72917    154.953  32.8636  0               10.217    0.93   0.25            airfoil file "B7779 CRM-05a proxy kink_eta03514 eta=0.3514"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 BaseThickChord=0.105944 ThickChord=0.105944
    2  10.7082  8.72917     5.30697    75.1506  32.4545  0               7.28222   -1.45  0.25            airfoil file "B7779 CRM-05a proxy mid_eta06495 eta=0.6495"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 BaseThickChord=0.0970058 ThickChord=0.0970058
    3  8.06125  5.30697     3          33.4823  33       0               4.99961   -2.42  0.25            airfoil file "B7779 CRM-05a proxy outboard_eta08740 eta=0.8740"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 BaseThickChord=0.0952497 ThickChord=0.0952497
    4  4.52585  3           0.4572     7.82338  47.5867  0               5.86917   -3.75  0.25            airfoil file "B7779 CRM-05a proxy tip_eta10000 eta=1.0000"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 BaseThickChord=0.0950008 ThickChord=0.0950008

Fuselage "engine", child of "Wing"
  location (X Y Z) 26.1096 10.7052 -2.86032, rotation 0 0 0
  symmetric about XZ
  bounding box size 8 27.3356 5.92524
  Design: Length=8
  cross sections:
    n  XLocPercent  YLocPercent  ZLocPercent  shape
    0  1            0            0            point
    1  0.340249     0            0            circle Circle_Diameter=3
    2  0            0            0            ellipse Ellipse_Height=4 Ellipse_Width=4
    3  0.755435     0            -0.0163934   ellipse Ellipse_Height=3.25 Ellipse_Width=3.25
    4  0.680233     0            0            ellipse Ellipse_Height=1.3716 Ellipse_Width=1.3716
    5  1            0            0            point

Fuselage "fan", child of "engine"
  location (X Y Z) 27.4812 10.7052 -2.86032, rotation 0 0 0; relative location 1.3716 0 0, rotation 0 0 0
  symmetric about XZ
  bounding box size 0.4572 24.7104 3.3
  Design: Length=0.4572
  cross sections:
    n  XLocPercent  YLocPercent  ZLocPercent  shape
    0  0            0            0            point
    1  0            0            0            circle Circle_Diameter=3.3
    2  1            0            0            as above
    3  1            0            0            point

Pod "PodGeom", child of "fan"
  location (X Y Z) 27.0349 10.7052 -2.86032, rotation 0 0 0; relative location -0.446314 0 0, rotation 0 0 0
  symmetric about XZ
  bounding box size 2.82321 22.1162 0.705803
  Design: FineRatio=8 Length=2.82321

Fuselage "base fuselage", child of "fuselage"
  location (X Y Z) 20 0 -3.2, rotation 0 0 0
  bounding box size 30 6.58537 3.28884
  Design: Length=30
  cross sections:
    n  XLocPercent  YLocPercent  ZLocPercent  shape
    0  0            0            0            point
    1  0.25         0            0            general fuselage BotStr=2 BotTanAngle=87.2589 CornerRad=1.17222 Height=1.55 LowStr=2 MaxWidthLoc=3.24365 TopStr=1.15717 TopTanAngle=0 UpStr=0.83 Width=6.4
    2  0.5          0            0            as above
    3  0.75         0            0            as above
    4  1            0            0.0243182    point

Wing "horizontal stabilizer", child of "fuselage"
  location (X Y Z) 64.8 0 0.2, rotation 5.65217 0 0
  symmetric about XZ
  bounding box size 11.5774 24.5234 2.06007
  totals: TotalSpan=24.5699 TotalProjectedSpan=24.56 TotalChord=4.35 TotalArea=106.879 TotalAR=5.64369 MAC=4.88812
  root: chord 7, twist 0, NACA 4-series Camber=0 CamberLoc=0.2 ThickChord=0.12
  sections:
    n  Span    Root_Chord  Tip_Chord  Area     Sweep  Sweep_Location  Dihedral  Twist  Twist_Location  tip airfoil
    1  12.285  7           1.7        53.4396  38.8   0               1.63043   0      0.25            NACA 4-series Camber=0 CamberLoc=0.2 ThickChord=0.1

Wing "vertical stabilizer", child of "horizontal stabilizer"
  location (X Y Z) 58 0 1.2, rotation 90 0 0
  bounding box size 17.8687 1.33077 11.6212
  totals: TotalSpan=11.6212 TotalProjectedSpan=11.6212 TotalChord=8.5 TotalArea=79.9412 TotalAR=1.6894 MAC=7.80874
  root: chord 13.3, twist 0, NACA 4-series Camber=0 CamberLoc=0.2 ThickChord=0.1
  sections:
    n  Span     Root_Chord  Tip_Chord  Area     Sweep    Sweep_Location  Dihedral  Twist  Twist_Location  tip airfoil
    1  2.11667  13.3        8.8        23.3892  68.1818  0               0         0      0.25            as above
    2  9.50454  8.8         3.1        56.552   44.9306  0               0         0      0.25            as above

Fuselage "Floor", child of "fuselage"
  location (X Y Z) 0 0 0, rotation 0 0 0
  bounding box size 64.335 6 0.104821
  Design: Length=64.335
  cross sections:
    n  XLocPercent  YLocPercent  ZLocPercent  shape
    0  0            0            -0.0143416   point
    1  0.0202067    0            -0.0142667   ellipse Ellipse_Height=0.1 Ellipse_Width=2.4
    2  0.0326416    0            -0.0143416   ellipse Ellipse_Height=0.1 Ellipse_Width=2.9
    3  0.165384     0            -0.0143416   general fuselage BotStr=0.465 BotTanAngle=90 CornerRad=0 Height=0.1 LowStr=0.68 MaxWidthLoc=0.05 TopStr=0.83 TopTanAngle=90 UpStr=0.83 Width=6
    4  0.4379       0            -0.0143416   as above
    5  0.727733     0            -0.0143416   as above
    6  0.893759     0            -0.0143416   as above
    7  1            0            -0.0143416   ellipse Ellipse_Height=0.1 Ellipse_Width=3.8
    8  1            0            -0.0143416   point

Fuselage "Cargo door fwd"
  location (X Y Z) 10.96 2.255 -2.12121, rotation -129 0 0
  bounding box size 3.25667 1.30339 1.51027
  Design: Length=2.69
  cross sections:
    n  XLocPercent  YLocPercent  ZLocPercent  shape
    0  0            0            0            point
    1  0            0            0            general fuselage BotStr=0.961212 BotTanAngle=90 CornerRad=0 Height=0.1 LowStr=0.767121 MaxWidthLoc=-0.654822 TopStr=0.841061 TopTanAngle=49.5455 UpStr=0.826751 Width=1.7
    2  1            0            0            general fuselage BotStr=0.961212 BotTanAngle=90 CornerRad=0 Height=0.1 LowStr=0.767121 MaxWidthLoc=-0.954315 TopStr=0.841061 TopTanAngle=49.5455 UpStr=0.826751 Width=1.7
    3  1            0            0            point

Fuselage "Cargo door aft", child of "Cargo door fwd"
  location (X Y Z) 52.63 2.255 -2.12121, rotation -129 0 0
  bounding box size 2.34667 1.30339 1.51027
  Design: Length=1.78
  cross sections:
    n  XLocPercent  YLocPercent  ZLocPercent  shape
    0  0            0            0            point
    1  0            0            0            general fuselage BotStr=0.961212 BotTanAngle=90 CornerRad=0 Height=0.1 LowStr=0.767121 MaxWidthLoc=-0.654822 TopStr=0.841061 TopTanAngle=49.5455 UpStr=0.826751 Width=1.7
    2  1            0            0            as above
    3  1            0            0            point

Fuselage "Main entry service door 1"
  location (X Y Z) 6.225 2.65 -0.121212, rotation -85 -10 0
  symmetric about XZ
  bounding box size 1.73268 6.2685 1.92907
  Design: Length=1.07
  cross sections:
    n  XLocPercent  YLocPercent  ZLocPercent  shape
    0  0            0            0            point
    1  0            0            0            general fuselage BotStr=0.961212 BotTanAngle=90 CornerRad=0 Height=0.1 LowStr=0.767121 MaxWidthLoc=-3.53807 TopStr=0.841061 TopTanAngle=49.5455 UpStr=0.826751 Width=1.88
    2  1            0            0            as above
    3  1            0            0            point

Fuselage "Main entry service door 2", child of "Main entry service door 1"
  location (X Y Z) 22.935 3.04 -0.121212, rotation -89.1082 0 0
  symmetric about XZ
  bounding box size 1.69667 6.44156 1.88531
  Design: Length=1.07
  cross sections:
    n  XLocPercent  YLocPercent  ZLocPercent  shape
    0  0            0            0            point
    1  0            0            0            general fuselage BotStr=0.961212 BotTanAngle=90 CornerRad=0 Height=0.1 LowStr=0.767121 MaxWidthLoc=-3.53807 TopStr=0.841061 TopTanAngle=49.5455 UpStr=0.826751 Width=1.88
    2  1            0            0            as above
    3  1            0            0            point

Fuselage "Main entry service door 3", child of "Main entry service door 1"
  location (X Y Z) 42.185 3.04 -0.121212, rotation -89.1082 0 0
  symmetric about XZ
  bounding box size 1.69667 6.44156 1.88531
  Design: Length=1.07
  cross sections:
    n  XLocPercent  YLocPercent  ZLocPercent  shape
    0  0            0            0            point
    1  0            0            0            general fuselage BotStr=0.961212 BotTanAngle=90 CornerRad=0 Height=0.1 LowStr=0.767121 MaxWidthLoc=-3.53807 TopStr=0.841061 TopTanAngle=49.5455 UpStr=0.826751 Width=1.88
    2  1            0            0            as above
    3  1            0            0            point

Fuselage "Main entry service door 4", child of "Main entry service door 1"
  location (X Y Z) 61.265 2.72 -0.121212, rotation -90 6.9697 0
  symmetric about XZ
  bounding box size 1.72731 5.84593 1.88
  Design: Length=1.07
  cross sections:
    n  XLocPercent  YLocPercent  ZLocPercent  shape
    0  0            0            0            point
    1  0            0            0            general fuselage BotStr=0.961212 BotTanAngle=90 CornerRad=0 Height=0.1 LowStr=0.767121 MaxWidthLoc=-3.53807 TopStr=0.841061 TopTanAngle=49.5455 UpStr=0.826751 Width=1.88
    2  1            0            0            as above
    3  1            0            0            point

NGonMesh "MeshGeom_NGon"
  location (X Y Z) 0 0 0, rotation 0 0 0

NGonMesh "MeshGeom_NGon"
  location (X Y Z) 0 0 0, rotation 0 0 0

NGonMesh "MeshGeom_NGon"
  location (X Y Z) 0 0 0, rotation 0 0 0

VSPAERO settings (reference component "Wing"): Sref=542.819 bref=71.8298 cref=9.74443 Xcg=35.54 Ycg=0 Zcg=0 AlphaStart=3.2 AlphaEnd=4 AlphaNpts=1 BetaStart=0 BetaEnd=0 BetaNpts=1 MachStart=0.6 MachEnd=0 MachNpts=1 ReCref=1e+07 Vinf=100 Rho=0.002377
