OpenVSP model (file version 5), 5 components.
Geometry view with OpenVSP parameter names; values to 6 digits, angles in degrees, lengths in the model's unit.
Overall bounding box: X_Min=0 X_Len=76.3774 Y_Min=-35.5869 Y_Len=71.1739 Z_Min=-3.975 Z_Len=16.9143

Fuselage "fuselage"
  location (X Y Z) 0 0 0, rotation 0 0 0
  bounding box size 75 6.2 6.2
  Design: Length=75
  cross sections:
    n  XLocPercent  YLocPercent  ZLocPercent  shape
    0  0            0            -0.0143416   point
    1  0.0173333    0            -0.0143416   ellipse Ellipse_Height=2.35 Ellipse_Width=2.4
    2  0.028        0            -0.0110821   ellipse Ellipse_Height=3.45 Ellipse_Width=3.1
    3  0.141867     0            -0.0065189   general fuselage BotStr=0.465 BotTanAngle=90 CornerRad=0 Height=6.2 LowStr=0.68 MaxWidthLoc=0.05 TopStr=0.83 TopTanAngle=90 UpStr=0.83 Width=6.2
    4  0.370965     0            -0.0065189   as above
    5  0.616        0            -0.0065189   as above
    6  0.766667     0            -0.0065189   as above
    7  1            0            0.00912647   ellipse Ellipse_Height=1.3 Ellipse_Width=0.5
    8  1            0            0.00912647   point

Wing "Wing", child of "fuselage"
  location (X Y Z) 25.1 0 -2.31, rotation 0 0 0
  symmetric about XZ
  bounding box size 25.5847 71.1739 6.4288
  totals: TotalSpan=71.8298 TotalProjectedSpan=71.148 TotalChord=6.29472 TotalArea=542.819 TotalAR=9.32547 MAC=9.74443
  root: chord 15.8283, twist 6.72, CST airfoil ContLERad=1 LowDegree=15 ThickChord=0.153793 UpDegree=15 Au=[0.260516 0.153433 0.223487 0.256212 -0.144808 1.04062 -1.23624 2.04819 -1.65756 1.77977 -0.853621 0.77236 -0.0882218 0.21168 0.0399856 0.0475533] Al=[-0.260516 -0.152679 -0.226593 -0.246444 0.126549 -1.01883 1.2288 -2.07282 1.72049 -1.86276 0.932079 -0.822068 0.116409 -0.216186 -0.0318121 -0.0401664]
  sections:
    n  Span     Root_Chord  Tip_Chord  Area     Sweep    Sweep_Location  Dihedral  Twist  Twist_Location  tip airfoil
    1  12.6196  15.8283     8.72917    154.953  32.8636  0               10.217    0.93   0.25            CST airfoil ContLERad=1 LowDegree=15 ThickChord=0.105402 UpDegree=15 Au=[0.187842 0.0516297 0.402722 -0.623885 1.85934 -2.98249 4.67468 -5.15775 5.14993 -3.61994 2.44143 -0.926273 0.545064 0.0417831 0.141942 0.132205] Al=[-0.187842 -0.0323106 -0.475891 0.842459 -2.2216 3.2973 -4.43542 3.94171 -2.90191 0.945768 -0.0470314 -0.548372 0.272182 -0.171331 0.0912517 0.0788951]
    2  10.7082  8.72917     5.30697    75.1506  32.4545  0               7.28222   -1.45  0.25            CST airfoil ContLERad=1 LowDegree=15 ThickChord=0.0961581 UpDegree=15 Au=[0.171967 0.0557956 0.335314 -0.471675 1.53375 -2.57583 4.35997 -5.22772 5.67287 -4.46463 3.26677 -1.48362 0.848821 -0.0167828 0.228831 0.211113] Al=[-0.171967 -0.0219292 -0.460473 0.838419 -2.11162 2.9902 -3.69056 2.7473 -1.34781 -0.556297 1.16072 -1.21951 0.634821 -0.217896 0.189656 0.168499]
    3  8.06125  5.30697     3          33.4823  33       0               4.99961   -2.42  0.25            CST airfoil ContLERad=1 LowDegree=15 ThickChord=0.0939929 UpDegree=15 Au=[0.168713 0.0561301 0.322346 -0.441666 1.45685 -2.44715 4.17716 -5.03678 5.50854 -4.36659 3.21934 -1.47393 0.846857 -0.0187174 0.229917 0.211987] Al=[-0.168713 -0.0215591 -0.44942 0.812668 -2.03565 2.84499 -3.45033 2.4469 -1.03197 -0.81091 1.33649 -1.30429 0.676776 -0.222104 0.19977 0.177833]
    4  4.52585  3           0.4572     7.82338  47.5867  0               5.86917   -3.75  0.25            CST airfoil ContLERad=1 LowDegree=15 ThickChord=0.0932961 UpDegree=15 Au=[0.168027 0.0410835 0.373233 -0.588527 1.65651 -2.49459 3.61797 -3.55418 3.14074 -1.72749 0.946647 -0.106747 0.104677 0.0977837 0.0229606 0.0239781] Al=[-0.168027 -0.0391156 -0.380442 0.609499 -1.68897 2.51613 -3.57472 3.40439 -2.88364 1.43106 -0.686276 -0.0519379 -0.0176957 -0.111595 0.00153087 -0.00179761]

Fuselage "base fuselage", child of "fuselage"
  location (X Y Z) 20 0 -3.2, rotation 0 0 0
  bounding box size 30 6.58299 2.72642
  Design: Length=30
  cross sections:
    n  XLocPercent  YLocPercent  ZLocPercent  shape
    0  0            0            0            point
    1  0.25         0            0            general fuselage BotStr=2 BotTanAngle=87.2589 CornerRad=1.17222 Height=1.55 LowStr=2 MaxWidthLoc=3.24365 TopStr=0.83 TopTanAngle=0 UpStr=0.83 Width=6.4
    2  0.5          0            0            as above
    3  0.75         0            0            as above
    4  1            0            0.0243182    point

Wing "horizontal stabilizer", child of "fuselage"
  location (X Y Z) 64.8 0 0.2, rotation 0 0 0
  symmetric about XZ
  bounding box size 11.5774 24.5088 2.0663
  totals: TotalSpan=24.5699 TotalProjectedSpan=24.3718 TotalChord=4.35 TotalArea=106.879 TotalAR=5.55751 MAC=4.88812
  root: chord 7, twist 0, NACA 4-series Camber=0 CamberLoc=0.2 ThickChord=0.12
  sections:
    n  Span    Root_Chord  Tip_Chord  Area     Sweep  Sweep_Location  Dihedral  Twist  Twist_Location  tip airfoil
    1  12.285  7           1.7        53.4396  38.8   0               7.28243   0      0.25            NACA 4-series Camber=0 CamberLoc=0.2 ThickChord=0.1

Wing "vertical stabilizer", child of "horizontal stabilizer"
  location (X Y Z) 58 0 1.2, rotation 90 0 0
  bounding box size 17.8687 1.33077 11.7393
  totals: TotalSpan=11.6212 TotalProjectedSpan=11.6212 TotalChord=8.5 TotalArea=79.9412 TotalAR=1.6894 MAC=7.80874
  root: chord 13.3, twist 0, NACA 4-series Camber=0 CamberLoc=0.2 ThickChord=0.1
  sections:
    n  Span     Root_Chord  Tip_Chord  Area     Sweep    Sweep_Location  Dihedral  Twist  Twist_Location  tip airfoil
    1  2.11667  13.3        8.8        23.3892  68.1818  0               0         0      0.25            as above
    2  9.50454  8.8         3.1        56.552   44.9306  0               0         0      0.25            as above

VSPAERO settings (reference component "Wing"): Sref=542.819 bref=71.8298 cref=9.74443 Xcg=35.54 Ycg=0 Zcg=0 AlphaStart=3 AlphaEnd=6 AlphaNpts=1 BetaStart=0 BetaEnd=0 BetaNpts=1 MachStart=0.6 MachEnd=0 MachNpts=1 ReCref=1e+07 Vinf=100 Rho=0.002377
