OpenVSP model (file version 5), 5 components.
Geometry view with OpenVSP parameter names; values to 6 digits, angles in degrees, lengths in the model's unit.
Overall bounding box: X_Min=0 X_Len=64.2451 Y_Min=-29.5925 Y_Len=59.185 Z_Min=-3.975 Z_Len=16.3782

Fuselage "FuselageGeom"
  location (X Y Z) 0 0 0, rotation 0 0 0
  bounding box size 62.5 6.2 6.2
  Design: Length=62.5
  cross sections:
    n  XLocPercent  YLocPercent  ZLocPercent  shape
    0  0            0            -0.0143416   point
    1  0.0185       0            -0.0150431   ellipse Ellipse_Height=2.14719 Ellipse_Width=2
    2  0.0285       0            -0.0120587   ellipse Ellipse_Height=3.02458 Ellipse_Width=2.7
    3  0.17         0            -0.0065189   ellipse Ellipse_Height=6.2 Ellipse_Width=6.2
    4  0.692534     0            -0.0065189   as above
    5  1            0            0.0129015    ellipse Ellipse_Height=1.2 Ellipse_Width=0.2
    6  1            0            0.00912647   point

Wing "WingGeom", child of "FuselageGeom"
  location (X Y Z) 20.5 0 -2.05, rotation 0 0 0
  symmetric about XZ
  bounding box size 25.0408 59.185 4.36932
  totals: TotalSpan=59.2757 TotalProjectedSpan=58.9644 TotalChord=6.05 TotalArea=415.508 TotalAR=8.36757 MAC=8.35335
  root: chord 13.7, twist 6.72, CST airfoil ContLERad=1 LowDegree=15 ThickChord=0.153793 UpDegree=15 Au=[0.260516 0.153433 0.223487 0.256212 -0.144808 1.04062 -1.23624 2.04819 -1.65756 1.77977 -0.853621 0.77236 -0.0882218 0.21168 0.0399856 0.0475533] Al=[-0.260516 -0.152679 -0.226593 -0.246444 0.126549 -1.01883 1.2288 -2.07282 1.72049 -1.86276 0.932079 -0.822068 0.116409 -0.216186 -0.0318121 -0.0401664]
  sections:
    n  Span     Root_Chord  Tip_Chord  Area     Sweep  Sweep_Location  Dihedral  Twist  Twist_Location  tip airfoil
    1  10.9     13.7        7.3        114.45   36.6   0               3.1       0.93   0.25            CST airfoil ContLERad=1 LowDegree=15 ThickChord=0.105402 UpDegree=15 Au=[0.187842 0.0516297 0.402722 -0.623885 1.85934 -2.98249 4.67468 -5.15775 5.14993 -3.61994 2.44143 -0.926273 0.545064 0.0417831 0.141942 0.132205] Al=[-0.187842 -0.0323106 -0.475891 0.842459 -2.2216 3.2973 -4.43542 3.94171 -2.90191 0.945768 -0.0470314 -0.548372 0.272182 -0.171331 0.0912517 0.0788951]
    2  8.8      7.3         5.1        54.56    35     0.25            4.7       -1.45  0.25            CST airfoil ContLERad=1 LowDegree=15 ThickChord=0.0961581 UpDegree=15 Au=[0.171967 0.0557956 0.335314 -0.471675 1.53375 -2.57583 4.35997 -5.22772 5.67287 -4.46463 3.26677 -1.48362 0.848821 -0.0167828 0.228831 0.211113] Al=[-0.171967 -0.0219292 -0.460473 0.838419 -2.11162 2.9902 -3.69056 2.7473 -1.34781 -0.556297 1.16072 -1.21951 0.634821 -0.217896 0.189656 0.168499]
    3  6.2      5.1         3.6        26.97    35     0.25            7.9       -2.42  0.25            CST airfoil ContLERad=1 LowDegree=15 ThickChord=0.0939929 UpDegree=15 Au=[0.168713 0.0561301 0.322346 -0.441666 1.45685 -2.44715 4.17716 -5.03678 5.50854 -4.36659 3.21934 -1.47393 0.846857 -0.0187174 0.229917 0.211987] Al=[-0.168713 -0.0215591 -0.44942 0.812668 -2.03565 2.84499 -3.45033 2.4469 -1.03197 -0.81091 1.33649 -1.30429 0.676776 -0.222104 0.19977 0.177833]
    4  3.73783  3.6         2.7        11.7742  35     0.25            9.5       -3.75  0.25            CST airfoil ContLERad=1 LowDegree=15 ThickChord=0.0932961 UpDegree=15 Au=[0.168027 0.0410835 0.373233 -0.588527 1.65651 -2.49459 3.61797 -3.55418 3.14074 -1.72749 0.946647 -0.106747 0.104677 0.0977837 0.0229606 0.0239781] Al=[-0.168027 -0.0391156 -0.380442 0.609499 -1.68897 2.51613 -3.57472 3.40439 -2.88364 1.43106 -0.686276 -0.0519379 -0.0176957 -0.111595 0.00153087 -0.00179761]

Fuselage "WingBodyFairing", child of "FuselageGeom"
  location (X Y Z) 16.2295 0 -3.2, rotation 0 0 0
  bounding box size 25 6.58299 2.72642
  Design: Length=25
  cross sections:
    n  XLocPercent  YLocPercent  ZLocPercent  shape
    0  0            0            0            point
    1  0.25         0            0            general fuselage BotStr=2 BotTanAngle=87.2589 CornerRad=1.17222 Height=1.55 LowStr=2 MaxWidthLoc=3.24365 TopStr=0.83 TopTanAngle=0 UpStr=0.83 Width=6.4
    2  0.5          0            0            as above
    3  0.75         0            0            as above
    4  1            0            0.0243182    point

Wing "HTailGeom", child of "FuselageGeom"
  location (X Y Z) 52.85 0 0.2, rotation 0 0 0
  symmetric about XZ
  bounding box size 11.3951 21.6314 1.86839
  totals: TotalSpan=21.6179 TotalProjectedSpan=21.4435 TotalChord=4.3 TotalArea=92.9569 TotalAR=4.94663 MAC=4.64186
  root: chord 6.4, twist 0, NACA 4-series Camber=0 CamberLoc=0.2 ThickChord=0.12
  sections:
    n  Span     Root_Chord  Tip_Chord  Area     Sweep  Sweep_Location  Dihedral  Twist  Twist_Location  tip airfoil
    1  10.8089  6.4         2.2        46.4784  37     0.25            7.28243   0      0.25            NACA 4-series Camber=0 CamberLoc=0.2 ThickChord=0.1

Wing "VTailGeom", child of "HTailGeom"
  location (X Y Z) 49.3694 0 1, rotation 90 0 0
  bounding box size 13.6356 0.911784 11.7632
  totals: TotalSpan=11.3076 TotalProjectedSpan=11.3076 TotalChord=5.75 TotalArea=65.0186 TotalAR=1.96654 MAC=6.36232
  root: chord 9, twist 0, NACA 4-series Camber=0 CamberLoc=0.2 ThickChord=0.1
  sections:
    n  Span     Root_Chord  Tip_Chord  Area     Sweep  Sweep_Location  Dihedral  Twist  Twist_Location  tip airfoil
    1  11.3076  9           2.5        65.0186  44.5   0               0         0      0.25            as above

VSPAERO settings (reference component "WingGeom"): Sref=415.508 bref=59.2757 cref=8.35335 Xcg=35.54 Ycg=0 Zcg=0 AlphaStart=3 AlphaEnd=6 AlphaNpts=1 BetaStart=0 BetaEnd=0 BetaNpts=1 MachStart=0.6 MachEnd=0 MachNpts=1 ReCref=1e+07 Vinf=100 Rho=0.002377
