OpenVSP model (file version 5), 5 components.
Geometry view with OpenVSP parameter names; values to 6 digits, angles in degrees, lengths in the model's unit.
Overall bounding box: X_Min=-0.0111258 X_Len=8.28876 Y_Min=-8.88326 Y_Len=17.7665 Z_Min=-0.26674 Z_Len=1.90734

Fuselage "FuselageGeom"
  location (X Y Z) 0 0 0, rotation 0 0 0
  bounding box size 8.17858 0.79468 1.07697
  Design: Length=8.16
  cross sections:
    n  XLocPercent  YLocPercent  YRotate   ZLocPercent  shape
    0  0            0            0         0            ellipse Ellipse_Height=0.0604 Ellipse_Width=0.0604
    1  0.153964     0            -7.71429  0.0232736    ellipse Ellipse_Height=0.899326 Ellipse_Width=0.713761
    2  0.299533     0            0         0.0371549    ellipse Ellipse_Height=1.01156 Ellipse_Width=0.752726
    3  0.454087     0            4.78125   0.0377043    ellipse Ellipse_Height=0.75376 Ellipse_Width=0.590613
    4  0.679312     0            0         0.0341594    ellipse Ellipse_Height=0.374136 Ellipse_Width=0.366986
    5  0.847853     0            0         0.0361963    ellipse Ellipse_Height=0.272153 Ellipse_Width=0.255824
    6  0.941625     0            0         0.0376457    ellipse Ellipse_Height=0.248674 Ellipse_Width=0.161655
    7  1            0            6.48884   0.0430988    ellipse Ellipse_Height=0.131886 Ellipse_Width=0.0124253

Wing "WingGeom", child of "FuselageGeom"
  location (X Y Z) 2.51025 0 0.163934, rotation 0 0 0
  symmetric about XZ
  bounding box size 1.28377 17.7665 0.723114
  totals: TotalSpan=17.5366 TotalProjectedSpan=17.5 TotalChord=0.996386 TotalArea=17.8819 TotalAR=17.1263 MAC=1.06249
  root: chord 1.28374, twist 0, CST airfoil ContLERad=0 LowDegree=3 ThickChord=0.191929 UpDegree=3 Au=[0.223497 0.408261 0.33064 0.255428] Al=[-0.151131 -0.080267 -0.379209 0.133891]
  sections:
    n  Span     Root_Chord  Tip_Chord  Area     Sweep  Sweep_Location  Dihedral  Twist  Twist_Location  tip airfoil
    1  4.94973  1.28374     1.07032    5.82597  0      0               3.7       0      0.25            as above
    2  3.81854  1.07032     0.561174   3.11496  0      0               3.7       0      0.25            as above
  SS_Control "AILERON": EtaStart=0.57 EtaEnd=0.98 Length_C_Start=0.3 Length_C_End=0.3 Length_Start=0.319167 Length_End=0.175367 LE_Flag=0 Surf_Type=2

Wing "HTailGeom", child of "FuselageGeom"
  location (X Y Z) 7.33446 0 1.59964, rotation 0 0 0
  symmetric about XZ
  bounding box size 0.818756 3.40952 0.0819231
  totals: TotalSpan=3.27777 TotalProjectedSpan=3.27777 TotalChord=0.651937 TotalArea=2.1369 TotalAR=5.02774 MAC=0.666165
  root: chord 0.818756, twist 0, NACA 4-series Camber=0 CamberLoc=0.2 ThickChord=0.1
  sections:
    n  Span     Root_Chord  Tip_Chord  Area     Sweep    Sweep_Location  Dihedral  Twist  Twist_Location  tip airfoil
    1  1.63889  0.818756    0.485117   1.06845  7.79464  0               0         0      0.25            as above
  SS_Control "ELEVATOR": EtaStart=0 EtaEnd=1 Length_C_Start=0.35 Length_C_End=0.35 Length_Start=0.286564 Length_End=0.169791 LE_Flag=0 Surf_Type=2

Wing "VTailGeom", child of "FuselageGeom"
  location (X Y Z) 6.91 0 0.295, rotation 90 0 0
  bounding box size 1.36849 0.124459 1.3885
  totals: TotalSpan=1.305 TotalProjectedSpan=1.305 TotalChord=0.900712 TotalArea=1.36248 TotalAR=1.24995 MAC=1.06192
  root: chord 1.235, twist 0, NACA 4-series Camber=0 CamberLoc=0.2 ThickChord=0.1
  sections:
    n  Span      Root_Chord  Tip_Chord  Area       Sweep    Sweep_Location  Dihedral  Twist  Twist_Location  tip airfoil
    1  1.18911   1.235       0.915      1.2783     20.8393  0               0         0      0.25            as above
    2  0.115888  0.915       0.537848   0.0841838  20.839   0               0         0      0.25            as above
  SS_Control "RUDDER": EtaStart=0.1 EtaEnd=0.911111 Length_C_Start=0.375 Length_C_End=0.375 Length_Start=0.449956 Length_End=0.343136 LE_Flag=0 Surf_Type=2

Pod "TailFairing", child of "FuselageGeom"
  location (X Y Z) 7.38 0 1.6, rotation 0 0 0
  bounding box size 0.6 0.06 0.06
  Design: FineRatio=20 Length=0.6

VSPAERO settings (reference component "WingGeom"): Sref=17.8819 bref=17.5366 cref=1.06249 Xcg=2.87 Ycg=0 Zcg=0.164 AlphaStart=2 AlphaEnd=12 AlphaNpts=1 BetaStart=0 BetaEnd=0 BetaNpts=1 MachStart=0 MachEnd=0.1 MachNpts=1 ReCref=4.4e+06 Vinf=29.1667 Rho=1.225
  control group "AILERON_GROUP": DeflectionAngle=0
  control group "ELEVATOR_GROUP": DeflectionAngle=0
  control group "RUDDER_GROUP": DeflectionAngle=0
